// SBML level 2 version 4

model chassagnole()
  // biomodels.db:BIOMD0000000051
  // isDescribedBy pubmed:17590932
  // occursIn taxonomy:562

  // Compartments:
  compartment cytosol = 1;  // GO:0005829
  compartment extracellular = 1;  // GO:0005576

  // Species:
  species cdhap in cytosol = cdhap_init;  // CHEBI:16108 kegg.compound:C00111
  species ce4p in cytosol = ce4p_init;  // CHEBI:48153; kegg.compound:C00279
  species cf6p in cytosol = cf6p_init;  // kegg.compound:C05345; isVersionOf kegg.compound:C00085; isVersionOf CHEBI:15946
  species cfdp in cytosol = cfdp_init;  // CHEBI:16905 kegg.compound:C00354
  species cg1p in cytosol = cg1p_init;  // CHEBI:16077 kegg.compound:C00103
  species cg6p in cytosol = cg6p_init;  // CHEBI:17665 kegg.compound:C00668
  species cgap in cytosol = cgap_init;  // CHEBI:17138 kegg.compound:C00661
  species cpep in cytosol = cpep_init;  // CHEBI:18021 kegg.compound:C00074
  species cpg in cytosol = cpg_init;  // CHEBI:16863 kegg.compound:C00345
  species cpg2 in cytosol = cpg2_init;  // CHEBI:17835 kegg.compound:C00631
  species cpg3 in cytosol = cpg3_init;  // CHEBI:17794 kegg.compound:C00197
  species cpgp in cytosol = cpgp_init;  // CHEBI:16001 kegg.compound:C00236
  species cpyr in cytosol = cpyr_init;  // CHEBI:15361 kegg.compound:C00022
  species crib5p in cytosol = crib5p_init;  // CHEBI:17797 kegg.compound:C00117
  species cribu5p in cytosol = cribu5p_init;  // CHEBI:17363 kegg.compound:C00199
  species csed7p in cytosol = csed7p_init;  // CHEBI:15721 kegg.compound:C00281
  species cxyl5p in cytosol = cxyl5p_init;  // CHEBI:16332 kegg.compound:C00231
  species cglcex in extracellular = cglcex_init;  // CHEBI:4167; kegg.compound:C00031; isVersionOf CHEBI:17234 kegg.compound:C00293

  // Parameters:
  cdhap_init = 0.167 mM;
  ce4p_init = 0.098 mM;
  cpg2_init = 0.399 mM;
  cpg3_init = 2.13 mM;
  cpgp_init = 0.008 mM;
  crib5p_init = 0.398 mM;
  cribu5p_init = 0.111 mM;
  csed7p_init = 0.276 mM;
  cxyl5p_init = 0.138 mM;
  kALDOdhap = 0.088 mM;
  kALDOeq = 0.144 mM;
  kALDOfdp = 1.75 mM;
  kALDOgap = 0.088 mM;
  kALDOgapinh = 0.6 mM;
  KDAHPSe4p = 0.035 mM;
  KDAHPSpep = 0.0053 mM;
  KENOeq = 6.73 mM;
  KENOpep = 0.135 mM;
  KENOpg2 = 0.1 mM;
  KG1PATatp = 4.42 mM;
  KG1PATfdp = 0.119 mM;
  KG1PATg1p = 3.2 mM;
  KG3PDHdhap = 1 mM;
  KG6PDHg6p = 14.4 mM;
  KG6PDHnadp = 0.0246 mM;
  KG6PDHnadphg6pinh = 6.43 mM;
  KG6PDHnadphnadpinh = 0.01 mM;
  KGAPDHeq = 0.63 dimensionless;
  KGAPDHgap = 0.683 mM;
  KGAPDHnad = 0.252 mM;
  KGAPDHnadh = 1.09 mM;
  KGAPDHpgp = 1.04e-5 mM;
  KPDHpyr = 1159 mM;
  KpepCxylasefdp = 0.7 mM;
  KpepCxylasepep = 4.07 mM;
  KPFKadpa = 128 mM;
  KPFKadpb = 3.89 mM;
  KPFKadpc = 4.14 mM;
  KPFKampa = 19.1 mM;
  KPFKampb = 3.2 mM;
  KPFKatps = 0.123 mM;
  KPFKf6ps = 0.325 mM;
  KPFKpep = 3.26 mM;
  KPGDHatpinh = 208 mM;
  KPGDHnadp = 0.0506 mM;
  KPGDHnadphinh = 0.0138 mM;
  KPGDHpg = 37.5 mM;
  KPGIeq = 0.1725 dimensionless;
  KPGIf6p = 0.266 mM;
  KPGIf6ppginh = 0.2 mM;
  KPGIg6p = 2.9 mM;
  KPGIg6ppginh = 0.2 mM;
  KPGKadp = 0.185 mM;
  KPGKatp = 0.653 mM;
  KPGKeq = 1934.4 dimensionless;
  KPGKpg3 = 0.473 mM;
  KPGKpgp = 0.0468 mM;
  KPGluMueq = 0.188 dimensionless;
  KPGluMupg2 = 0.369 mM;
  KPGluMupg3 = 0.2 mM;
  KPGMeq = 0.196 dimensionless;
  KPGMg1p = 0.0136 mM;
  KPGMg6p = 1.038 mM;
  KPKadp = 0.26 mM;
  KPKamp = 0.2 mM;
  KPKatp = 22.5 mM;
  KPKfdp = 0.19 mM;
  KPKpep = 0.31 mM;
  KPTSa1 = 3082.3 mM;
  KPTSa2 = 0.01 mM;
  KPTSa3 = 245.3 dimensionless;
  KPTSg6p = 2.15 mM;
  KR5PIeq = 4 dimensionless;
  KRPPKrib5p = 0.1 mM;
  KRu5Peq = 1.4 dimensionless;
  KSerSynthpg3 = 1 mM;
  KSynth1pep = 1 mM;
  KSynth2pyr = 1 mM;
  KTAeq = 1.05 dimensionless;
  kTISdhap = 2.8 mM;
  kTISeq = 1.39 dimensionless;
  kTISgap = 0.3 mM;
  KTKaeq = 1.2 dimensionless;
  KTKbeq = 10 dimensionless;
  LPFK = 5629067 dimensionless;
  LPK = 1000 dimensionless;
  nDAHPSe4p = 2.6 dimensionless;
  nDAHPSpep = 2.2 dimensionless;
  nG1PATfdp = 1.2 mM;
  nPDH = 3.68 dimensionless;
  npepCxylasefdp = 4.21 dimensionless;
  nPFK = 11.1 dimensionless;
  nPK = 4 dimensionless;
  nPTSg6p = 3.66 dimensionless;
  rmaxALDO = 17.41464 mM_per_second;
  rmaxDAHPS = 0.1079531 mM_per_second;
  rmaxENO = 330.4476 mM_per_second;
  rmaxG1PAT = 0.007525458 mM_per_second;
  rmaxG3PDH = 0.01162043 mM_per_second;
  rmaxG6PDH = 1.380197 mM_per_second;
  rmaxGAPDH = 921.5943 mM_per_second;
  rmaxMetSynth = 0.0022627 mM_per_second;
  rmaxMurSynth = 0.00043711 mM_per_second;
  rmaxPDH = 6.059531 mM_per_second;
  rmaxpepCxylase = 0.1070206 mM_per_second;
  rmaxPFK = 1840.585 mM_per_second;
  rmaxPGDH = 16.23236 mM_per_second;
  rmaxPGI = 650.9879 mM_per_second;
  rmaxPGK = 3021.774 mM_per_second;
  rmaxPGluMu = 89.04965 mM_per_second;
  rmaxPGM = 0.8398243 mM_per_second;
  rmaxPK = 0.0611315 mM_per_second;
  rmaxPTS = 7829.78 mM_per_second;
  rmaxR5PI = 4.83841193 second_inverse;
  rmaxRPPK = 0.01290045 mM_per_second;
  rmaxRu5P = 6.739029 second_inverse;
  rmaxSerSynth = 0.025712107 mM_per_second;
  rmaxSynth1 = 0.01953897 mM_per_second;
  rmaxSynth2 = 0.07361855 mM_per_second;
  rmaxTA = 10.87164 per_mM_per_second;
  rmaxTIS = 68.67474 mM_per_second;
  rmaxTKa = 9.473385 per_mM_per_second;
  rmaxTKb = 86.55856 per_mM_per_second;
  rmaxTrpSynth = 0.001037 mM_per_second;
  VALDOblf = 2 dimensionless;
  cf6p_init = 0.6 mM;
  cfdp_init = 0.272 mM;
  cfeed = 110.96 mM;
  cg1p_init = 0.653 mM;
  cg6p_init = 3.48 mM;
  cgap_init = 0.218 mM;
  cglcex_init = 2 mM;
  cpep_init = 2.67 mM;
  cpg_init = 0.808 mM;
  cpyr_init = 2.67 mM;
  Dil = 2.78e-5 second_inverse;
  mu = 2.78e-5 second_inverse;
  cadp has mM;
  camp has mM;
  catp has mM;
  cnad has mM;
  cnadh has mM;
  cnadp has mM;
  cnadph has mM;

  // Assignment rules:
  cadp := 0.582 + 1.73*2.731^(-0.15*time)*(0.12*time + 0.000214*time^3);
  camp := 0.123 + 7.25*(time/(7.25 + 1.47*time + 0.17*time^2)) + 1.073/(1.29 + 8.05*time);
  catp := 4.27 - 4.163*(time/(0.657 + 1.43*time + 0.0364*time^2));
  cnad := 1.314 + 1.314*2.73^(-0.0435*time - 0.342) - (time + 7.871)*(2.73^(-0.0218*time - 0.171)/(8.481 + time));
  cnadh := 0.0934 + 0.00111*2.371^(-0.123*time)*(0.844*time + 0.104*time^3);
  cnadp := 0.159 - 0.00554*(time/(2.8 - 0.271*time + 0.01*time^2)) + 0.182/(4.82 + 0.526*time);
  cnadph := 0.062 + 0.332*2.718^(-0.464*time)*(0.0166*time^1.58 + 0.000166*time^4.73 + 0.1312*10^(-9)*time^7.89 + 0.1362*10^(-12)*time^11 + 0.1233*10^(-15)*time^14.2);

  // Reactions:
  vALDO: cfdp -> cdhap + cgap; cytosol*rmaxALDO*(cfdp - cgap*cdhap/kALDOeq)/(kALDOfdp + cfdp + kALDOgap*cdhap/(kALDOeq*VALDOblf) + kALDOdhap*cgap/(kALDOeq*VALDOblf) + cfdp*cgap/kALDOgapinh + cgap*cdhap/(VALDOblf*kALDOeq));  // isHomologTo reactome:REACT_1602; kegg.reaction:R01070; isVersionOf ec-code:4.1.2.13
  vDAHPS: ce4p + cpep -> ; cytosol*rmaxDAHPS*ce4p^nDAHPSe4p*cpep^nDAHPSpep/((KDAHPSe4p + ce4p^nDAHPSe4p)*(KDAHPSpep + cpep^nDAHPSpep));  // kegg.reaction:R01826; isVersionOf ec-code:2.5.1.54
  vDHAP: cdhap -> ; cytosol*mu*cdhap;  // isVersionOf GO:0044275
  vE4P: ce4p -> ; cytosol*mu*ce4p;
  vENO: cpg2 -> cpep; cytosol*rmaxENO*(cpg2 - cpep/KENOeq)/(KENOpg2*(1 + cpep/KENOpep) + cpg2);  // isHomologTo reactome:REACT_1400; kegg.reaction:R00658; isVersionOf ec-code:4.2.1.11
  vEXTER: -> cglcex; extracellular*Dil*(cfeed - cglcex);
  vG1PAT: cg1p -> ; cytosol*rmaxG1PAT*cg1p*catp*(1 + (cfdp/KG1PATfdp)^nG1PATfdp)/((KG1PATatp + catp)*(KG1PATg1p + cg1p));  // modifiers: cfdp; kegg.reaction:R00948; isVersionOf ec-code:2.7.7.27
  vG3PDH: cdhap -> ; cytosol*rmaxG3PDH*cdhap/(KG3PDHdhap + cdhap);  // isHomologTo reactome:REACT_16938; kegg.reaction:R00842; isVersionOf ec-code:1.1.1.8
  vG6P: cg6p -> ; cytosol*mu*cg6p;  // isVersionOf GO:0044275
  vG6PDH: cg6p -> cpg; cytosol*rmaxG6PDH*cg6p*cnadp/((cg6p + KG6PDHg6p)*(1 + cnadph/KG6PDHnadphg6pinh)*(KG6PDHnadp*(1 + cnadph/KG6PDHnadphnadpinh) + cnadp));  // hasPart kegg.reaction:R00835 kegg.reaction:R02035; hasPart ec-code:1.1.1.49 ec-code:3.1.1.31
  vGAP: cgap -> ; cytosol*mu*cgap;  // isVersionOf GO:0019683
  vGAPDH: cgap -> cpgp; cytosol*rmaxGAPDH*(cgap*cnad - cpgp*cnadh/KGAPDHeq)/((KGAPDHgap*(1 + cpgp/KGAPDHpgp) + cgap)*(KGAPDHnad*(1 + cnadh/KGAPDHnadh) + cnad));  // isHomologTo reactome:REACT_1847; kegg.reaction:R01061; isVersionOf ec-code:1.2.1.12
  vGLP: cg1p -> ; cytosol*mu*cg1p;
  vMURSyNTH: 2 cf6p -> ; cytosol*rmaxMurSynth;  // isVersionOf GO:0006002
  vMethSynth: -> cpyr; cytosol*rmaxMetSynth;  // isVersionOf GO:0042866
  vPDH: cpyr -> ; cytosol*rmaxPDH*cpyr^nPDH/(KPDHpyr + cpyr^nPDH);  // isVersionOf ec-code:1.2.1.51; kegg.reaction:R00209; isPartOf kegg.pathway:rn00620
  vPEP: cpep -> ; cytosol*mu*cpep;  // isVersionOf GO:0046395
  vPFK: cf6p -> cfdp; cytosol*rmaxPFK*catp*cf6p/((catp + KPFKatps*(1 + cadp/KPFKadpc))*(cf6p + KPFKf6ps*(1 + cpep/KPFKpep + cadp/KPFKadpb + camp/KPFKampb)/(1 + cadp/KPFKadpa + camp/KPFKampa))*(1 + LPFK/(1 + cf6p*(1 + cadp/KPFKadpa + camp/KPFKampa)/(KPFKf6ps*(1 + cpep/KPFKpep + cadp/KPFKadpb + camp/KPFKampb)))^nPFK));  // modifiers: cpep; isHomologTo reactome:REACT_736; kegg.reaction:R00756; isVersionOf ec-code:2.7.1.11
  vPG: cpg -> ; cytosol*mu*cpg;
  vPG3: cpg3 -> ; cytosol*mu*cpg3;  // isVersionOf GO:0044275
  vPGDH: cpg -> cribu5p; cytosol*rmaxPGDH*cpg*cnadp/((cpg + KPGDHpg)*(cnadp + KPGDHnadp*(1 + cnadph/KPGDHnadphinh)*(1 + catp/KPGDHatpinh)));  // isVersionOf ec-code:1.1.1.44; kegg.reaction:R01528; isHomologTo reactome:REACT_611
  vPGI: cg6p -> cf6p; cytosol*rmaxPGI*(cg6p - cf6p/KPGIeq)/(KPGIg6p*(1 + cf6p/(KPGIf6p*(1 + cpg/KPGIf6ppginh)) + cpg/KPGIg6ppginh) + cg6p);  // modifiers: cpg; isHomologTo reactome:REACT_1255; kegg.reaction:R00771; isVersionOf ec-code:5.3.1.9 GO:0004347
  vPGK: cpgp -> cpg3; cytosol*rmaxPGK*(cadp*cpgp - catp*cpg3/KPGKeq)/((KPGKadp*(1 + catp/KPGKatp) + cadp)*(KPGKpgp*(1 + cpg3/KPGKpg3) + cpgp));  // isHomologTo reactome:REACT_1186; kegg.reaction:R01512; isVersionOf ec-code:2.7.2.3
  vPGM: cg6p -> cg1p; cytosol*rmaxPGM*(cg6p - cg1p/KPGMeq)/(KPGMg6p*(1 + cg1p/KPGMg1p) + cg6p);  // isHomologTo reactome:REACT_605; kegg.reaction:R00959; isVersionOf ec-code:5.4.2.2
  vPGP: cpgp -> ; cytosol*mu*cpgp;  // isVersionOf GO:0044275
  vPK: cpep -> cpyr; cytosol*rmaxPK*cpep*(cpep/KPKpep + 1)^(nPK - 1)*cadp/(KPKpep*(LPK*((1 + catp/KPKatp)/(cfdp/KPKfdp + camp/KPKamp + 1))^nPK + (cpep/KPKpep + 1)^nPK)*(cadp + KPKadp));  // modifiers: cfdp; isHomologTo reactome:REACT_1524; kegg.reaction:R00200; isVersionOf ec-code:2.7.1.40
  vPPK: crib5p -> ; cytosol*rmaxRPPK*crib5p/(KRPPKrib5p + crib5p);  // kegg.reaction:R01049; isVersionOf ec-code:2.7.6.1; isHomologTo reactome:REACT_2023
  vPTS: cglcex + 65 cpep -> 65 cg6p + 65 cpyr; extracellular*rmaxPTS*cglcex*(cpep/cpyr)/((KPTSa1 + KPTSa2*(cpep/cpyr) + KPTSa3*cglcex + cglcex*(cpep/cpyr))*(1 + cg6p^nPTSg6p/KPTSg6p));  // kegg.pathway:eco02060
  vR5PI: cribu5p -> crib5p; cytosol*rmaxR5PI*(cribu5p - crib5p/KR5PIeq);  // isVersionOf ec-code:5.3.1.6; kegg.reaction:R01056; isHomologTo reactome:REACT_6907
  vRIB5P: crib5p -> ; cytosol*mu*crib5p;
  vRibu5p: cribu5p -> ; cytosol*mu*cribu5p;
  vRu5P: cribu5p -> cxyl5p; cytosol*rmaxRu5P*(cribu5p - cxyl5p/KRu5Peq);  // kegg.reaction:R01529; isVersionOf ec-code:5.1.3.1; isHomologTo reactome:REACT_1522
  vSED7P: csed7p -> ; cytosol*mu*csed7p;
  vSynth1: cpep -> ; cytosol*rmaxSynth1*cpep/(KSynth1pep + cpep);  // isVersionOf GO:0009423
  vSynth2: cpyr -> ; cytosol*rmaxSynth2*cpyr/(KSynth2pyr + cpyr);  // hasPart GO:0006523 GO:0009097 GO:0019877
  vTA: cgap + csed7p -> cf6p + ce4p; cytosol*rmaxTA*(cgap*csed7p - ce4p*cf6p/KTAeq);  // isHomologTo reactome:REACT_1272; kegg.reaction:R01827; isVersionOf ec-code:2.2.1.2
  vTIS: cdhap -> cgap; cytosol*rmaxTIS*(cdhap - cgap/kTISeq)/(kTISdhap*(1 + cgap/kTISgap) + cdhap);  // isHomologTo reactome:REACT_469; kegg.reaction:R01015; isVersionOf ec-code:5.3.1.1
  vTKA: crib5p + cxyl5p -> cgap + csed7p; cytosol*rmaxTKa*(crib5p*cxyl5p - csed7p*cgap/KTKaeq);  // isHomologTo reactome:REACT_162; kegg.reaction:R01641; isVersionOf ec-code:2.2.1.1
  vTKB: ce4p + cxyl5p -> cgap + cf6p; cytosol*rmaxTKb*(cxyl5p*ce4p - cf6p*cgap/KTKbeq);  // isHomologTo reactome:REACT_1811; kegg.reaction:R01067; isVersionOf ec-code:2.2.1.1
  vTRPSYNTH: -> cpyr + cgap; cytosol*rmaxTrpSynth;  // isVersionOf GO:0000162
  vXYL5P: cxyl5p -> ; cytosol*mu*cxyl5p;
  vf6P: cf6p -> ; cytosol*mu*cf6p;  // isVersionOf GO:0044275
  vfdP: cfdp -> ; cytosol*mu*cfdp;  // isVersionOf GO:0044275
  vpepCxylase: cpep -> ; cytosol*rmaxpepCxylase*cpep*(1 + (cfdp/KpepCxylasefdp)^npepCxylasefdp)/(KpepCxylasepep + cpep);  // modifiers: cfdp; kegg.reaction:R00345; isVersionOf ec-code:4.1.1.31
  vpg2: cpg2 -> ; cytosol*mu*cpg2;  // isVersionOf GO:0044275
  vpyr: cpyr -> ; cytosol*mu*cpyr;
  vrpGluMu: cpg3 -> cpg2; cytosol*rmaxPGluMu*(cpg3 - cpg2/KPGluMueq)/(KPGluMupg3*(1 + cpg2/KPGluMupg2) + cpg3);  // isHomologTo reactome:REACT_576; kegg.reaction:R01518; isVersionOf ec-code:5.4.2.1
  vsersynth: cpg3 -> ; cytosol*rmaxSerSynth*cpg3/(KSerSynthpg3 + cpg3);  // isVersionOf GO:0009070

  // Unit definitions:
  unit substance = 1e-3 mole;
  unit mM = 1e-3 mole / litre;
  unit second_inverse = 1 / second;
  unit mM_per_second = 1e-3 mole / (litre * second);
  unit per_mM_per_second = litre / (1e-3 mole * second);
end
